*Heading
** Job name: Monotonic Model name: Model-1
** Generated by: Abaqus/CAE 2018
*Preprint, echo=NO, model=NO, history=NO, contact=NO
**
** PARTS
**
*Part, name=Part-1
*End Part
**
**
** ASSEMBLY
**
*Assembly, name=Assembly
**
*Instance, name=Part-1-1, part=Part-1
*Node
*include, input=nodes.inp
*************************************************
*User element, nodes=4, type=U1, properties=31, coordinates=2, var=64
1,2
1,3
1,9
*************************************************
*ELEMENT, TYPE=U1, ELSET=SOLID
*include, input=mesh.inp
*************************************************
*Element, type=CPE4, elset=Visualization
*include, input=Dummy1.inp
****************************************************
** Section: Section-1
*Nset, nset=Set-1, generate
     1,  37464,      1
*Elset, elset=Set-1, generate
     1,  36947,      1
*Nset, nset=Clamp1
   1,  15,  16,  17,  18,  19
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*Elset, elset=Clamp1
  811,  812,  813,  814,  815,  816
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*Nset, nset=Clamp2
   10, 1021, 1022, 1023, 1024, 1025
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*Elset, elset=Clamp2
 18937, 18938, 18939, 18940, 18941, 18942
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*Nset, nset=Top
   3,   5,   8, 217, 218, 219
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*Elset, elset=Top
  2234,  2266,  2298,  2330,  2362,  2394
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*Nset, nset=Bottom
   12,   13,   14,  965,  966,  967
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*Elset, elset=Bottom
 20826, 20853, 20880, 20907, 20934, 20961
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** Section: COM
*Solid Section, Elset=Visualization, Material=Material-1
,
,
*End Instance
**
****************************
**angle, Xlcf, Gcf, Xlcif, Gcif, xk, KflagF, KflagD
**Sa, Sd, Psi_th_f, Psi_th_if, E11, E22, E12, Nu12
** Nu23, G12, R1T, R2T, R1C, R2C, R12,  P21_plus,
** P21_minus, P22_plus, P22_minus, E11F, V12F, magnitude, Alpha
*UEL PROPERTY, ELSET=Part-1-1.Set-1
90.0, 5.0, 106.3, 2.5 ,0.7879,0, 0, 0
5.0,1.0, 20.0, 0.5, 114800.0, 11700.0, 9600.0, 0.0222
0.21, 9600.0, 2000.0,70.0, 1650.0, 240.0,105.0, 0.3
0.25, 0.225, 0.2250, 114800.0, 0.21, 1.30, 0.0
*End Assembly
**
** MATERIALS
**
*Material, name=Material-1
**Density
**1.,
*Depvar
     16,
1, S11, S11
2, S22, S22
3, S12, S12
4, E11, E11
5, E22, E22
6, E12, E12
7, Phi_f, phi_f
8, Hif, Hif
9, Hf, Hf
10, Phi_if, Phi_if
11, f1, f1
12, f2, f2
13, f3, f3
14, f4, f4
15, f5, f5
16, f6, f6
**Specific Heat
**1.,
*User Material, constants=0
**
*Amplitude, name=Amp-1
             0.,              1.,              1.,              1.
**
** BOUNDARY CONDITIONS
**
** Name: BC-1 Type: Displacement/Rotation
** Name: BC-2 Type: Displacement/Rotation
** ----------------------------------------------------------------
**
** STEP: Step-1
**
*Step, name=Step-1, nlgeom=YES, inc=1000000
*Static, stabilize
0.001, 1, 1e-10, 0.002
**
** BOUNDARY CONDITIONS
**
** Name: BC-3 Type: Displacement/Rotation
*Boundary
Part-1-1.Clamp1, 2, 2, 0.2
Part-1-1.Clamp2, 2, 2, -0.2
**
** CONTROLS
**
**Solution Technique, type=QUASI-NEWTON, reform kernel=25
*Controls, reset
*Controls, parameters=time incrementation
 100,100,100,100,50, 5, , , ,
 , , , , , , , ,
** OUTPUT REQUESTS
**
*Restart, write, frequency=0
**
** FIELD OUTPUT: F-Output-1
**
*Output, field
*Node Output
U, UR, RF
*Element Output, directions=YES
SDV,
**
** HISTORY OUTPUT: H-Output-1
*Output, history, name=H1
*Node Output, NSET=Part-1-1.Clamp2
RF2, U2
**
*End Step
