*Heading
** Job name: Monotonic Model name: Model-1
** Generated by: Abaqus/CAE 2018
*Preprint, echo=NO, model=NO, history=NO, contact=NO
**
** PARTS
**
*Part, name=Part-1
*End Part
**
**
** ASSEMBLY
**
*Assembly, name=Assembly
**
*Instance, name=Part-1-1, part=Part-1
*Node
      1,        -8.75,          10.
      2,        -8.75,          30.
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*************************************************
*User element, nodes=4, type=U1, properties=31, coordinates=2, var=64
1,2
1,3
1,9
*************************************************
*ELEMENT, TYPE=U1, ELSET=SOLID
   1,    1,   27, 1496,  372
   2,   27,   28, 1497, 1496
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*************************************************
*Element, type=CPE4, elset=Visualization
100001, 1, 27, 1496, 372
100002, 27, 28, 1497, 1496
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****************************************************
** Section: Section-1
*Elset, elset=Set-1, generate
     1,  20736,      1
** Section: COM
*Solid Section, Elset=Visualization, Material=Material-1
,
,
*End Instance
**
*Nset, nset=Crack, instance=Part-1-1
    5,   19,   22,   23,   25, 1336
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*Elset, elset=Crack, instance=Part-1-1
 19379, 19380, 19381, 19382, 19383, 19384
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*Nset, nset=EL-0, instance=Part-1-1, generate
     1,  21129,      1
*Elset, elset=EL-0, instance=Part-1-1, generate
     1,  20736,      1
*Nset, nset=Force, instance=Part-1-1
 24,
*Nset, nset=Force_area, instance=Part-1-1
    2,    6,   17,   20,   24,  426,  427,  428,  429, 1242, 1243, 1244, 1245, 1403, 1404
*Elset, elset=Force_area, instance=Part-1-1
  6251,  6301,  6351,  6401,  6451, 18924, 18925, 18926, 18927, 18928, 19397, 19447, 19546, 19596
*Nset, nset=Force_left, instance=Part-1-1
    6,   24, 1403
*Elset, elset=Force_left, instance=Part-1-1
 19397, 19447
*Nset, nset=Force_right, instance=Part-1-1
   20,   24, 1404
*Elset, elset=Force_right, instance=Part-1-1
 19546, 19596
*Nset, nset=Left_support, instance=Part-1-1
 8,
*Nset, nset=Right_support, instance=Part-1-1
 13,
*Elset, elset=EL-stiff, instance=Part-1-1
 6251, 6301, 6351, 6401, 6451, 8733
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*Elset, elset=EL_0, instance=Part-1-1
1, 2, 3, 4, 5, 6
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**
**angle, Xlcf, Gcf, Xlcif, Gcif, xk, KflagF, KflagD
**Sa, Sd, Psi_th_f, Psi_th_if, E11, E22, E12, Nu12
** Nu23, G12, R1T, R2T, R1C, R2C, R12,  P21_plus,
** P21_minus, P22_plus, P22_minus, E11F, V12F, magnitude, Alpha
*UEL PROPERTY, ELSET=EL-0
0.0, 8.0, 106.3, 4.5 ,0.7879,0, 0, 0
1.0,1.0, 20.0, 0.5, 114800.0, 11700.0, 9600.0, 0.0222
0.21, 9600.0, 2000.0,70.0, 1650.0, 240.0,105.0, 0.3
0.25, 0.225, 0.2250, 114800.0, 0.21, 1.30, 0.0
**UEL PROPERTY, ELSET=EL-stiff
**0.0, 8.0, 106.3, 4.5 ,10600.3,0, 0, 0
**1.0,1.0, 20.0, 0.5, 114800.0, 11700.0, 9600.0, 0.0222
**0.21, 9600.0, 2000.0,70.0, 1650.0, 240.0,105.0, 0.3
**0.25, 0.225, 0.2250, 114800.0, 0.21, 1.30, 0.00
*End Assembly
**
** MATERIALS
**
*Material, name=Material-1
**Density
**1.,
*Depvar
     16,
1, S11, S11
2, S22, S22
3, S12, S12
4, E11, E11
5, E22, E22
6, E12, E12
7, Phi_f, phi_f
8, Hif, Hif
9, Hf, Hf
10, Phi_if, Phi_if
11, f1, f1
12, f2, f2
13, f3, f3
14, f4, f4
15, f5, f5
16, f6, f6
**Specific Heat
**1.,
*User Material, constants=0
**
*Amplitude, name=Amp-1
             0.,              1.,              1.,              1.
**
** BOUNDARY CONDITIONS
**
** Name: BC-1 Type: Displacement/Rotation
*Boundary
Left_support, 1, 2
Right_support, 2, 2
** Name: BC-2 Type: Displacement/Rotation
** ----------------------------------------------------------------
**
** STEP: Step-1
**
*Step, name=Step-1, nlgeom=YES, inc=1000000
*Static, stabilize
0.001, 1, 1e-10, 0.002
**
** BOUNDARY CONDITIONS
**
** Name: BC-3 Type: Displacement/Rotation
*Boundary
Force_area, 2, 2, -0.60
**Boundary, Amplitude=Amp-1
**Force_area, 3, 3, 0.0
**Force_area, 9, 9, 0.0
**Left_support, 3, 3, 0.0
**Left_support, 9, 9, 0.0
**Right_support, 3, 3, 0.0
**Right_support, 9, 9, 0.0
**
** CONTROLS
**
**Solution Technique, type=QUASI-NEWTON, reform kernel=25
*Controls, reset
*Controls, parameters=time incrementation
 400,400,300,500,50, 10, , , ,
 , , , , , , , ,
** OUTPUT REQUESTS
**
*Restart, write, frequency=0
**
** FIELD OUTPUT: F-Output-1
**
*Output, field
*Node Output
U, UR, RF
*Element Output, directions=YES
SDV,
**
** HISTORY OUTPUT: H-Output-1
*Output, history, name=H1
*Node Output, NSET=Force_area
RF2, U2
**
*End Step
